units real
fix cmap all cmap system.cmap
fix_modify cmap energy yes
# LAMMPS force field generated by molrs

# CMAP crossterms: this fix must precede `read_data <data> fix cmap crossterm CMAP`

special_bonds lj 0.00000000000000000 0.00000000000000000 0.00000000000000000 coul 0.00000000000000000 0.00000000000000000 0.00000000000000000

pair_style lj/charmm/coul/charmm 900.00000000000000000 1000.00000000000000000
pair_modify mix arithmetic

pair_coeff C C 0.11000000000000000 3.56359487256135754 0.11000000000000000 3.56359487256135754
pair_coeff CT1 CT1 0.03200000000000000 3.56359487256135754 0.01000000000000000 3.38541512893328900
pair_coeff CT3 CT3 0.07800000000000000 3.63486677001258496 0.01000000000000000 3.38541512893328900
pair_coeff H H 0.04600000000000000 0.40001352444501237 0.04600000000000000 0.40001352444501237
pair_coeff HA3 HA3 0.02400000000000000 2.38760856461610960 0.02400000000000000 2.38760856461610960
pair_coeff HB1 HB1 0.02200000000000000 2.35197261589049589 0.02200000000000000 2.35197261589049589
pair_coeff NH1 NH1 0.20000000000000001 3.29632525711925606 0.20000000000000001 2.76178602623505176
pair_coeff NH1 O 0.14340344168260036 2.89999999999999991 0.14340344168260036 2.89999999999999991
pair_coeff O O 0.11999999999999998 3.02905564167715369 0.11999999999999998 2.49451641079294983

bond_style harmonic
bond_coeff CT1-C 249.99999999999994316 1.48999999999999999
bond_coeff CT3-C 249.99999999999994316 1.48999999999999999
bond_coeff CT3-CT1 222.49999999999994316 1.53800000000000026
bond_coeff HA3-CT3 321.99999999999994316 1.11099999999999999
bond_coeff HB1-CT1 329.99999999999988631 1.08000000000000007
bond_coeff NH1-C 369.99999999999988631 1.34500000000000020
bond_coeff NH1-CT1 319.99999999999988631 1.42999999999999994
bond_coeff NH1-CT3 319.99999999999988631 1.42999999999999994
bond_coeff NH1-H 439.99999999999988631 0.99700000000000011
bond_coeff O-C 619.99999999999977263 1.22999999999999998

angle_style hybrid harmonic charmm
angle_coeff CT1-NH1-C harmonic 50.00000000000000000 119.99999999999998579
angle_coeff CT3-CT1-C harmonic 52.00000000000000000 108.00000000000000000
angle_coeff CT3-NH1-C harmonic 50.00000000000000000 119.99999999999998579
angle_coeff H-NH1-C harmonic 34.00000000000000000 123.00000000000001421
angle_coeff H-NH1-CT1 harmonic 35.00000000000000000 117.00000000000000000
angle_coeff H-NH1-CT3 harmonic 35.00000000000000000 117.00000000000000000
angle_coeff HA3-CT3-C charmm 33.00000000000000000 109.50000000000001421 30.00000000000000355 2.16299999999999981
angle_coeff HA3-CT3-CT1 charmm 33.42999999999999972 110.09999999999999432 22.53000000000000114 2.17899999999999983
angle_coeff HA3-CT3-HA3 charmm 35.50000000000000000 108.40000000000001990 5.39999999999999947 1.80200000000000027
angle_coeff HB1-CT1-C harmonic 50.00000000000000000 109.50000000000001421
angle_coeff HB1-CT1-CT3 harmonic 35.00000000000000000 111.00000000000000000
angle_coeff NH1-C-CT1 harmonic 80.00000000000000000 116.50000000000000000
angle_coeff NH1-C-CT3 harmonic 80.00000000000000000 116.50000000000000000
angle_coeff NH1-CT1-C harmonic 50.00000000000000000 107.00000000000000000
angle_coeff NH1-CT1-CT3 harmonic 70.00000000000000000 113.50000000000000000
angle_coeff NH1-CT1-HB1 harmonic 48.00000000000000000 108.00000000000000000
angle_coeff NH1-CT3-HA3 harmonic 51.50000000000000000 109.50000000000001421
angle_coeff O-C-CT1 harmonic 80.00000000000000000 121.00000000000000000
angle_coeff O-C-CT3 harmonic 80.00000000000000000 121.00000000000000000
angle_coeff O-C-NH1 harmonic 80.00000000000000000 122.50000000000001421

dihedral_style hybrid charmm fourier
dihedral_coeff ---@pairs charmm 0.00000000000000000 1 0 1.00000000000000000
dihedral_coeff -CT1-CT3- fourier 1 0.20000000000000001 3 0.00000000000000000
dihedral_coeff C-CT1-NH1-C fourier 1 0.20000000000000001 1 180.00000000000000000
dihedral_coeff CT3-C-NH1-CT1 fourier 2 1.60000000000000009 1 0.00000000000000000 2.50000000000000000 2 180.00000000000000000
dihedral_coeff CT3-CT1-NH1-C fourier 1 1.80000000000000004 1 0.00000000000000000
dihedral_coeff CT3-NH1-C-CT1 fourier 2 1.60000000000000009 1 0.00000000000000000 2.50000000000000000 2 180.00000000000000000
dihedral_coeff H-NH1-C-CT1 fourier 1 2.50000000000000000 2 180.00000000000000000
dihedral_coeff H-NH1-C-CT3 fourier 1 2.50000000000000000 2 180.00000000000000000
dihedral_coeff H-NH1-CT1-C fourier 1 0.00000000000000000 1 0.00000000000000000
dihedral_coeff H-NH1-CT1-CT3 fourier 1 0.00000000000000000 1 0.00000000000000000
dihedral_coeff HA3-CT3-NH1-C fourier 1 0.00000000000000000 3 0.00000000000000000
dihedral_coeff HA3-CT3-NH1-H fourier 1 0.00000000000000000 3 0.00000000000000000
dihedral_coeff HB1-CT1-NH1-C fourier 1 0.00000000000000000 1 0.00000000000000000
dihedral_coeff HB1-CT1-NH1-H fourier 1 0.00000000000000000 1 0.00000000000000000
dihedral_coeff NH1-C-CT1-CT3 fourier 1 0.00000000000000000 1 0.00000000000000000
dihedral_coeff NH1-C-CT1-HB1 fourier 1 0.00000000000000000 1 0.00000000000000000
dihedral_coeff NH1-C-CT1-NH1 fourier 1 0.59999999999999998 1 0.00000000000000000
dihedral_coeff NH1-C-CT3-HA3 fourier 1 0.00000000000000000 3 0.00000000000000000
dihedral_coeff O-C-CT1-CT3 fourier 1 1.39999999999999991 1 0.00000000000000000
dihedral_coeff O-C-CT1-HB1 fourier 1 0.00000000000000000 1 0.00000000000000000
dihedral_coeff O-C-CT1-NH1 fourier 1 0.00000000000000000 1 0.00000000000000000
dihedral_coeff O-C-CT3-HA3 fourier 1 0.00000000000000000 3 180.00000000000000000
dihedral_coeff O-C-NH1-CT1 fourier 1 2.50000000000000000 2 180.00000000000000000
dihedral_coeff O-C-NH1-CT3 fourier 1 2.50000000000000000 2 180.00000000000000000
dihedral_coeff O-C-NH1-H fourier 1 2.50000000000000000 2 180.00000000000000000

improper_style harmonic
improper_coeff C-CT1-NH1-O 120.00000000000000000 0.00000000000000000
improper_coeff C-CT3-NH1-O 120.00000000000000000 0.00000000000000000
improper_coeff NH1-C-CT1-H 20.00000000000000000 0.00000000000000000
improper_coeff NH1-C-CT3-H 20.00000000000000000 0.00000000000000000
