units real
# LAMMPS force field generated by molrs

special_bonds lj 0.00000000000000000 0.00000000000000000 0.50000000000000000 coul 0.00000000000000000 0.00000000000000000 0.83333333333333337

pair_style lj/cut/coul/cut 1000.00000000000000000 1000.00000000000000000
pair_modify mix arithmetic

pair_coeff c3 c3 0.10780000007515091 3.39770953125725717
pair_coeff ca ca 0.09879999999945692 3.31521231002809991
pair_coeff cc cc 0.09879999999945692 3.31521231002809991
pair_coeff h2 h2 0.02080000001190599 2.24381751142439301
pair_coeff hc hc 0.02080000005655411 2.60017699808339575
pair_coeff hn hn 0.01000000001705985 1.10649620754638112
pair_coeff ho ho 0.00469999999789031 0.53792464608542956
pair_coeff na na 0.20419999974944533 3.20580994774233563
pair_coeff nb nb 0.09410000013404982 3.38416787022291166
pair_coeff nd nd 0.09410000013404982 3.38416787022291166
pair_coeff nv nv 0.11199999991173111 3.36813169407517776
pair_coeff oh oh 0.09300000011594518 3.24287133350323753

bond_style harmonic
bond_coeff c3-c3 228.88999999999998636 1.53540000000000010
bond_coeff c3-ca 243.90999999999999659 1.51469999999999994
bond_coeff c3-cc 255.13999999999998636 1.50019999999999998
bond_coeff c3-h2 347.01999999999998181 1.09499999999999997
bond_coeff c3-hc 345.25000000000000000 1.09620000000000006
bond_coeff c3-na 254.78999999999999204 1.46389999999999998
bond_coeff c3-oh 285.14999999999997726 1.42419999999999991
bond_coeff ca-ca 354.25000000000000000 1.39860000000000007
bond_coeff ca-na 329.31999999999999318 1.38579999999999992
bond_coeff ca-nb 386.49000000000000909 1.33919999999999995
bond_coeff ca-nd 328.64999999999997726 1.38640000000000008
bond_coeff ca-nv 342.30000000000001137 1.37440000000000007
bond_coeff cc-na 335.50000000000000000 1.38030000000000008
bond_coeff cc-nd 419.72000000000002728 1.31580000000000008
bond_coeff hn-nv 477.54000000000002046 1.01140000000000008
bond_coeff ho-oh 535.50999999999999091 0.97250000000000003

angle_style harmonic
angle_coeff c3-c3-h2 43.13000000000000256 110.42004755250967207
angle_coeff c3-c3-hc 43.27000000000000313 109.68004677699742899
angle_coeff c3-c3-na 65.00000000000000000 112.63004832777458830
angle_coeff c3-c3-oh 76.79000000000000625 109.66004711220060130
angle_coeff c3-ca-nb 66.70000000000000284 116.64004987447570727
angle_coeff c3-cc-na 64.62000000000000455 122.96005281225714612
angle_coeff c3-cc-nd 65.53000000000000114 123.87005303037366843
angle_coeff c3-na-ca 76.96999999999999886 120.50005164336940311
angle_coeff c3-na-cc 75.20999999999999375 126.65005456558871799
angle_coeff c3-oh-ho 65.12999999999999545 107.39004619662958362
angle_coeff ca-c3-hc 43.60999999999999943 110.63004747062322508
angle_coeff ca-ca-ca 63.67000000000000171 120.02005166683619564
angle_coeff ca-ca-na 67.81999999999999318 120.31005139005269200
angle_coeff ca-ca-nb 68.17000000000000171 122.94005257450251634
angle_coeff ca-ca-nd 67.60999999999999943 121.00005185765724036
angle_coeff ca-ca-nv 67.90999999999999659 120.94005171735113890
angle_coeff ca-na-cc 80.48999999999999488 117.32005050968184889
angle_coeff ca-nb-ca 83.15000000000000568 117.24005013162113187
angle_coeff ca-nd-cc 86.79000000000000625 105.45004547978432186
angle_coeff ca-nv-hn 57.71000000000000085 116.73005008493485946
angle_coeff cc-c3-hc 44.03999999999999915 110.36004741220357062
angle_coeff h2-c3-na 48.21999999999999886 108.29004658234768499
angle_coeff h2-c3-oh 56.65999999999999659 109.00004671474908946
angle_coeff hc-c3-hc 35.79999999999999716 107.73004622775374628
angle_coeff hn-nv-hn 46.35999999999999943 115.28004917702124033
angle_coeff na-c3-oh 84.48999999999999488 107.71004598999911650
angle_coeff na-ca-nb 71.53000000000000114 127.10005447196888895
angle_coeff na-cc-nd 76.96999999999999886 112.01004783287453392
angle_coeff nb-ca-nb 72.76000000000000512 127.30005455768403522
angle_coeff nb-ca-nv 74.95999999999999375 116.77004998748633113

dihedral_style fourier
dihedral_coeff c3-c3-na-ca 1 0.00000000000000000 2 0.00000000000000000
dihedral_coeff c3-c3-na-cc 1 0.00000000000000000 2 0.00000000000000000
dihedral_coeff c3-c3-oh-ho 1 0.06000000000000000 3 0.00000000000000000
dihedral_coeff c3-ca-nb-ca 1 4.79999999999999982 2 180.00000000000000000
dihedral_coeff c3-cc-na-c3 1 1.69999999999999996 2 180.00000000000000000
dihedral_coeff c3-cc-na-ca 1 1.69999999999999996 2 180.00000000000000000
dihedral_coeff c3-cc-nd-ca 1 4.75000000000000000 2 180.00000000000000000
dihedral_coeff c3-na-ca-ca 1 0.29999999999999999 2 180.00000000000000000
dihedral_coeff c3-na-ca-nb 1 0.29999999999999999 2 180.00000000000000000
dihedral_coeff c3-na-cc-nd 1 1.69999999999999996 2 180.00000000000000000
dihedral_coeff ca-ca-ca-na 1 3.62500000000000000 2 180.00000000000000000
dihedral_coeff ca-ca-ca-nb 1 3.62500000000000000 2 180.00000000000000000
dihedral_coeff ca-ca-ca-nv 1 3.62500000000000000 2 180.00000000000000000
dihedral_coeff ca-ca-na-cc 1 0.61299999999999999 2 180.00000000000000000
dihedral_coeff ca-ca-nb-ca 1 4.79999999999999982 2 180.00000000000000000
dihedral_coeff ca-ca-nd-cc 1 4.79999999999999982 2 180.00000000000000000
dihedral_coeff ca-ca-nv-hn 1 1.05000000000000004 2 180.00000000000000000
dihedral_coeff ca-na-c3-h2 1 0.00000000000000000 2 0.00000000000000000
dihedral_coeff ca-na-c3-oh 1 0.00000000000000000 2 0.00000000000000000
dihedral_coeff ca-na-cc-nd 1 1.69999999999999996 2 180.00000000000000000
dihedral_coeff ca-nb-ca-na 1 4.79999999999999982 2 180.00000000000000000
dihedral_coeff ca-nb-ca-nb 1 4.79999999999999982 2 180.00000000000000000
dihedral_coeff ca-nb-ca-nv 1 4.79999999999999982 2 180.00000000000000000
dihedral_coeff ca-nd-cc-na 1 4.75000000000000000 2 180.00000000000000000
dihedral_coeff cc-na-c3-h2 1 0.00000000000000000 2 0.00000000000000000
dihedral_coeff cc-na-c3-oh 1 0.00000000000000000 2 0.00000000000000000
dihedral_coeff cc-na-ca-nb 1 0.29999999999999999 2 180.00000000000000000
dihedral_coeff h2-c3-c3-hc 1 0.15555555600000001 3 0.00000000000000000
dihedral_coeff h2-c3-oh-ho 1 0.16666666699999999 3 0.00000000000000000
dihedral_coeff hc-c3-c3-na 1 0.15555555600000001 3 0.00000000000000000
dihedral_coeff hc-c3-c3-oh 1 0.09000000000000000 3 0.00000000000000000
dihedral_coeff hc-c3-ca-nb 1 0.00000000000000000 2 0.00000000000000000
dihedral_coeff hc-c3-cc-na 1 0.00000000000000000 3 0.00000000000000000
dihedral_coeff hc-c3-cc-nd 1 0.00000000000000000 3 0.00000000000000000
dihedral_coeff hn-nv-ca-nb 1 1.05000000000000004 2 180.00000000000000000
dihedral_coeff ho-oh-c3-na 1 0.16666666699999999 3 0.00000000000000000
dihedral_coeff na-ca-ca-nd 1 3.62500000000000000 2 180.00000000000000000
dihedral_coeff nb-ca-ca-nd 1 3.62500000000000000 2 180.00000000000000000
dihedral_coeff nd-ca-ca-nv 1 3.62500000000000000 2 180.00000000000000000

improper_style cvff
improper_coeff c3-ca-na-cc 1.10000000000000009 -1 2
improper_coeff c3-na-cc-nd 10.50000000000000000 -1 2
improper_coeff c3-nb-ca-nb 10.50000000000000000 -1 2
improper_coeff ca-ca-ca-nd 10.50000000000000000 -1 2
improper_coeff ca-hn-nv-hn 1.10000000000000009 -1 2
improper_coeff ca-na-ca-nb 10.50000000000000000 -1 2
improper_coeff ca-nb-ca-nv 10.50000000000000000 -1 2
