# LAMMPS force field generated by molrs
units real

special_bonds lj 0.00000000000000000 0.00000000000000000 0.50000000000000000 coul 0.00000000000000000 0.00000000000000000 0.83333333333333337

pair_style lj/cut/coul/cut 10.00000000000000000 10.00000000000000000
pair_modify mix geometric

pair_coeff C C 0.08599999999999999 3.39966999999999997
pair_coeff CT CT 0.10940000000000000 3.39966999999999997
pair_coeff H H 0.01570000000000000 1.06908000000000003
pair_coeff HA HA 0.01500000000000000 2.59963999999999995
pair_coeff HC HC 0.01570000000000000 2.64952999999999994
pair_coeff N N 0.17000000000000001 3.25000000000000000
pair_coeff O O 0.20999999999999999 2.95991999999999988

bond_style harmonic
bond_coeff C-HA 367.00000000000000000 1.10000000000000009
bond_coeff C-O 570.00000000000000000 1.22900000000000009
bond_coeff CT-HC 340.00000000000000000 1.09000000000000008
bond_coeff N-C 490.00000000000000000 1.33499999999999996
bond_coeff N-CT 337.00000000000000000 1.44900000000000007
bond_coeff N-H 434.00000000000000000 1.01000000000000001

angle_style harmonic
angle_coeff C-N-CT 50.00000000000000000 121.90000000000000568
angle_coeff C-N-H 50.00000000000000000 120.00000000000000000
angle_coeff H-N-CT 50.00000000000000000 118.04000000000000625
angle_coeff N-C-HA 50.00000000000000000 114.00000000000000000
angle_coeff N-C-O 80.00000000000000000 122.90000000000000568
angle_coeff N-CT-HC 50.00000000000000000 109.50000000000000000
angle_coeff O-C-HA 50.00000000000000000 123.00000000000000000

dihedral_style fourier
dihedral_coeff C-N-CT-HC 1 0.00000000000000000 3 0.00000000000000000
dihedral_coeff H-N-CT-HC 1 0.15500000000000000 3 0.00000000000000000
dihedral_coeff HA-C-N-CT 1 1.89999999999999991 2 180.00000000000000000
dihedral_coeff HA-C-N-H 1 2.50000000000000000 2 180.00000000000000000
dihedral_coeff O-C-N-CT 2 2.50000000000000000 2 180.00000000000000000 0.29999999999999999 1 0.00000000000000000
dihedral_coeff O-C-N-H 1 2.50000000000000000 2 180.00000000000000000

improper_style harmonic
improper_coeff C-N-O-HA 20.00000000000000000 0.00000000000000000
improper_coeff N-C-H-CT 10.50000000000000000 12.00000000000000000
