# LAMMPS force field generated by molrs
units metal

special_bonds lj 0.00000000000000000 0.00000000000000000 1.00000000000000000 coul 0.00000000000000000 0.00000000000000000 1.00000000000000000

pair_style lj/cut 9.50000000000000000
pair_modify mix arithmetic

pair_coeff A A 0.00846900955842372 3.12340000000000018
pair_coeff A B 0.00846900955842372 3.12340000000000018
pair_coeff B B 0.00846900955842372 3.12340000000000018
